// SBML level 2 version 4

model AMML()

  // Compartments:
  compartment C;
  compartment CL;
  compartment L2 = 1;
  compartment L3 = 1;
  compartment CV;
  compartment L1 = 1;
  compartment PV;

  // Species:
  substanceOnly species vC_L1 in L1 = 0;
  substanceOnly species vCCL in CL = 0;
  substanceOnly species vCC in C = 3/325.771*BV*C;
  substanceOnly species vC_PV in PV = 0;
  substanceOnly species vC_L2 in L2 = 0;
  substanceOnly species vC_L3 in L3 = 0;
  substanceOnly species vC_CV in CV = 0;

  // Parameters:
  // 0.469 L/h/kg
  fbCLint = 1.6884 unit_0;
  SFkp = 0.201;
  Kpl = 10;
  Qh = 1660 unit_1;
  Qha = 423 unit_1;
  Qpv = 1235 unit_1;
  // Liver Volume fraction of Body/Blood Volume
  LVf = 0.333 unit_1;
  // Body/Blood Volume
  BV = 3833 unit_1;
  Initial_for_BV = BV;
  Initial_for_Kpl = Kpl;
  Initial_for_LVf = LVf;
  Initial_for_Qh = Qh;
  Initial_for_SFkp = SFkp;
  Initial_for_fbCLint = fbCLint;

  // Assignment rules:
  clearrate := Initial_for_fbCLint/(Initial_for_SFkp*Initial_for_Kpl);
  PV := Initial_for_BV*Initial_for_LVf/5;
  CV := Initial_for_BV*Initial_for_LVf/5;
  CL := 1;
  C := Initial_for_BV*(1 - Initial_for_LVf);
  lob_flow := Initial_for_Qh/(Initial_for_SFkp*Initial_for_Kpl);

  // Rate rules:
  L2' = clearrate;
  L3' = clearrate;
  L1' = clearrate;

  // Reactions:
  clear: vC_L1 => vCCL; clearrate*(vC_L1/L1); clear is "clear_L1";
  L1r: vC_PV => vC_L1; Qpv*(vC_PV/PV); L1r is "PVtoL1";
  Cr: vC_CV => vCC; Qh*(vC_CV/CV); Cr is "CVtoC";
  clear_L2: vC_L2 => vCCL; clearrate*(vC_L2/L2);
  clear_L3: vC_L3 => vCCL; clearrate*(vC_L3/L3);
  CtoPV: vCC => vC_PV; Qpv*(vCC/C);
  L3toCV: vC_L3 => vC_CV; lob_flow*(vC_L3/L3);
  L1toL2: vC_L1 => vC_L2; lob_flow*(vC_L1/L1);
  L2toL3: vC_L2 => vC_L3; lob_flow*(vC_L2/L2);
  CtoL1: vCC => vC_L1; Qha*(vCC/C);

  // Unit definitions:
  unit volume = 1e-3 litre;
  unit substance = 1e-3 mole;
  unit unit_0 = 1e-3 litre / (1000 gram * second); unit_0 is "ml/s/kg";
  unit unit_1 = 1e-3 litre; unit_1 is "ml";
end
